*Heading
** Job name: CPT_90_HPM_schlag_Voll1 Model name: CPT_90_HPM_schlag_Voll1
** Generated by: Abaqus/CAE 2023
*Preprint, echo=NO, model=NO, history=NO, contact=NO
**
** PARTS
**
*Part, name=Pile
*Node
      1,           0., -0.300000012,          0.5
      2,           0.,           0.,          0.5
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*Element, type=C3D8R
1, 116,   1,   2,   3, 117,   4,   5,   6
2, 117,   4,   5,   6, 118,   7,   8,   9
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*Nset, nset=Pile_All, generate
   1,  207,    1
*Elset, elset=Pile_All, generate
  1,  88,   1
*Nset, nset=Force_Application
  64,  65,  66,  91, 115, 137, 160, 205, 206
*Elset, elset=Force_Application
 21, 43, 86, 87
*Nset, nset=spitzendruck
  88,  89,  90, 113, 114, 159, 182, 184, 207
*Elset, elset=spitzendruck
 42, 64, 65, 88
*Nset, nset=CylindersFaces0
  88,  89,  90, 113, 114, 159, 182, 184, 207
*Elset, elset=CylindersFaces0
 42, 64, 65, 88
*Nset, nset=CylindersFaces1
   1,   2,   3,  87, 112, 116, 158, 181, 183
*Elset, elset=CylindersFaces1
  1, 41, 42, 63, 64, 65, 66, 88
*Nset, nset=CylindersFaces2
   4,   5,   6,  86, 111, 117, 157, 180, 185
*Elset, elset=CylindersFaces2
  1,  2, 40, 41, 62, 63, 66, 67
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*Elset, elset=_Mantel_S5, internal
 22, 23, 24, 25, 26, 27
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*Elset, elset=_Mantel_S6, internal
  1,  2,  3,  4,  5,  6
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*Elset, elset=_Mantel_S3, internal
  1,  2,  3,  4,  5,  6
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*Elset, elset=_Mantel_S4, internal
 43, 66, 67, 68, 69, 70
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*Surface, type=ELEMENT, name=Mantel
_Mantel_S5, S5
_Mantel_S6, S6
_Mantel_S4, S4
_Mantel_S3, S3
*Elset, elset=_Pile_Surface_S5, internal
 22, 23, 24, 25, 26, 27
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*Elset, elset=_Pile_Surface_S6, internal
  1,  2,  3,  4,  5,  6
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*Elset, elset=_Pile_Surface_S2, internal
 21, 42, 43, 64, 65, 86, 87, 88
*Elset, elset=_Pile_Surface_S3, internal
  1,  2,  3,  4,  5,  6
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*Elset, elset=_Pile_Surface_S4, internal
 43, 66, 67, 68, 69, 70
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*Surface, type=ELEMENT, name=Pile_Surface
_Pile_Surface_S5, S5
_Pile_Surface_S6, S6
_Pile_Surface_S2, S2
_Pile_Surface_S4, S4
_Pile_Surface_S3, S3
*Elset, elset=_spitzendruck_S2, internal
 42, 64, 65, 88
*Surface, type=ELEMENT, name=spitzendruck
_spitzendruck_S2, S2
** Section: Pile_Section
*Solid Section, elset=Pile_All, material=Stahl
,
*End Part
**
*Part, name=Presse
*Node
      1, -0.212132037,  0.212132037,           0.
      2, -0.300000012,           0.,           0.
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*Element, type=C3D8R
1, 12, 11, 18, 13,  3,  2,  9,  4
2, 16, 15, 18, 17,  7,  6,  9,  8
3, 18, 11, 10, 17,  9,  2,  1,  8
4, 18, 15, 14, 13,  9,  6,  5,  4
*Node
     19,           0.,           0.,          0.5
*Nset, nset=Presse-RefPt_, internal
19,
*Nset, nset=Presse_RP
 19,
*Nset, nset=Presse_All, generate
  1,  18,   1
*Elset, elset=Presse_All, generate
 1,  4,  1
*Nset, nset=Presse_Unten, generate
 1,  9,  1
*Elset, elset=Presse_Unten, generate
 1,  4,  1
** Section: Presse_Section
*Solid Section, elset=Presse_All, material=Stahl
,
*End Part
**
*Part, name=Soil
*Node
      1,           0.,           2.,          22.
      2,           0.,           6.,          22.
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*Element, type=EC3D8R
   1,  1431,  1073,  1147,  1189, 11661, 11303, 11377, 11419
   2,  1119,  1146,  1232,  1229, 11349, 11376, 11462, 11459
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*Nset, nset=sketchFace
    19,    20,    21,    32,    33,    34
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*Elset, elset=sketchFace
 29540, 29541, 29542, 29543, 29544, 29545
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*Nset, nset=sketchUpEdge
   19,   20,   21,   32,   33,   34
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*Elset, elset=sketchUpEdge
 29540, 29541, 29543, 29544, 29545, 29547
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*Nset, nset=Soil_All, generate
     1,  41870,      1
*Elset, elset=Soil_All, generate
     1,  37657,      1
*Nset, nset=Bottom
    11,    12,    13,    27,    28,    30
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*Elset, elset=Bottom
 20242, 20243, 20244, 20245, 20246, 20247
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*Nset, nset=Back
    22,    23,    24,    25,    26,    28
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*Elset, elset=Back
 29689, 29698, 29707, 29716, 29725, 29734
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*Nset, nset=XZ_Face
     5,     6,     7,     8,     9,    10
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*Elset, elset=XZ_Face
  6169,  6170,  6171,  6172,  6173,  6174
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*Nset, nset=YZ_Face
     1,     2,     3,     4,     9,    10
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*Elset, elset=YZ_Face
     1,     2,     3,     4,     5,     6
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*Nset, nset=Soil_All_Geosta
     1,     2,     3,     4,     5,     6
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*Elset, elset=Soil_All_Geosta
     1,     2,     3,     4,     5,     6
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** Section: secEuler
*Eulerian Section, elset=Soil_All
HYPO-VW96-Sand, imatHYPO-VW96-Sand
*Surface, type=EULERIAN MATERIAL, name=imatHYPO-VW96-Sand
imatHYPO-VW96-Sand
*End Part
**
**
** ASSEMBLY
**
*Assembly, name=Assembly
**
*Instance, name=Pile-1, part=Pile
          0.,           0.,          26.
*End Instance
**
*Instance, name=Soil-1, part=Soil
*End Instance
**
*Instance, name=Presse-1, part=Presse
          0.,           0.,          37.
*End Instance
**
*Surface, type=NODE, name=Presse-1_Presse_Unten_CNS_, internal
Presse-1.Presse_Unten, 1.
*Surface, type=NODE, name=Pile-1_Force_Application_CNS_, internal
Pile-1.Force_Application, 1.
** Constraint: Presse_rigid_body
*Rigid Body, ref node=Presse-1.Presse_RP, elset=Presse-1.Presse_All
** Constraint: tie
*Tie, name=tie, adjust=yes
Pile-1_Force_Application_CNS_, Presse-1_Presse_Unten_CNS_
*End Assembly
*Amplitude, name=Amp_Einpressen
             0.,              0.,              9.,              1.
**
** MATERIALS
**
*Material, name=HYPO-VW96-Sand
*Density
 4.92,
*Elastic
30000., 0.25
*Mohr Coulomb
 31.5,9.
*Mohr Coulomb Hardening
 0.1,0.
*Material, name=Stahl
*Density
 23.4,
*Elastic
 2.1e+08, 0.3
**
** INTERACTION PROPERTIES
**
*Surface Interaction, name=Kontakt
*Friction
 0.15,
*Surface Behavior, pressure-overclosure=HARD
**
** BOUNDARY CONDITIONS
**
** Name: Back Type: Displacement/Rotation
*Boundary
Soil-1.Back, 1, 1
Soil-1.Back, 2, 2
** Name: Bottom Type: Displacement/Rotation
*Boundary
Soil-1.Bottom, 3, 3
** Name: Eindringen_Presse Type: Displacement/Rotation
*Boundary
Presse-1.Presse_RP, 1, 1
Presse-1.Presse_RP, 2, 2
Presse-1.Presse_RP, 3, 3
Presse-1.Presse_RP, 4, 4
Presse-1.Presse_RP, 5, 5
Presse-1.Presse_RP, 6, 6
** Name: Symmetrie_Pile Type: Displacement/Rotation
*Boundary
Pile-1.Pile_All, 1, 1
Pile-1.Pile_All, 2, 2
Pile-1.Pile_All, 4, 4
Pile-1.Pile_All, 5, 5
Pile-1.Pile_All, 6, 6
** Name: XZ_Face Type: Symmetry/Antisymmetry/Encastre
*Boundary
Soil-1.XZ_Face, YSYMM
** Name: YZ_Face Type: Symmetry/Antisymmetry/Encastre
*Boundary
Soil-1.YZ_Face, XSYMM
**
** PREDEFINED FIELDS
**
** Name: K0   Type: Geostatic stress
*Initial Conditions, type=STRESS, GEOSTATIC
Soil-1.Soil_All_Geosta, 0., 26., -418.298, 0., 0.5, 0.5
** Name: Materialzuweisung   Type: Material assignment
*Initial Conditions, type=VOLUME FRACTION
Soil-1.Soil_All_Geosta, Soil-1.imatHYPO-VW96-Sand, 1.
**
** INTERACTIONS
**
** Interaction: Allgemeinkontakt
*Contact, op=NEW
*Contact Inclusions, ALL EXTERIOR
*Contact Property Assignment
 ,  , Kontakt
** ----------------------------------------------------------------
**
** STEP: Schwerkraft
**
*Step, name=Schwerkraft, nlgeom=YES
*Dynamic, Explicit
, 0.1
*Bulk Viscosity
0.42, 1.2
**
** LOADS
**
** Name: Schwerkraft   Type: Gravity
*Dload
Soil-1.Soil_All, GRAV, 3.27, 0., 0., -1.
**
** OUTPUT REQUESTS
**
*Restart, write, number interval=1, time marks=NO
**
** FIELD OUTPUT: all-profil-vol
**
*Output, field, time interval=0.1
*Node Output, nset=Pile-1.Pile_All
U,
*Element Output, elset=Pile-1.Pile_All, directions=YES
S,
**
** FIELD OUTPUT: FieldOutSoil
**
*Node Output, nset=Soil-1.Soil_All
A, U
*Element Output, elset=Soil-1.Soil_All, directions=YES
EVF, SVAVG
**
** HISTORY OUTPUT: mantel
**
*Output, history, time interval=0.01
*Contact Output, surface=Pile-1.Mantel
CFS3,
**
** HISTORY OUTPUT: RF
**
*Node Output, nset=Presse-1.Presse_RP
RF1, RF2, RF3, RM3, U3
**
** HISTORY OUTPUT: spitzendruck
**
*Contact Output, surface=Pile-1.spitzendruck
CFN3,
*End Step
** ----------------------------------------------------------------
**
** STEP: Einpressen
**
*Step, name=Einpressen, nlgeom=YES
*Dynamic, Explicit
, 9.
*Bulk Viscosity
0.42, 1.2
**
** BOUNDARY CONDITIONS
**
** Name: Eindringen_Presse Type: Displacement/Rotation
*Boundary, amplitude=Amp_Einpressen
Presse-1.Presse_RP, 1, 1
Presse-1.Presse_RP, 2, 2
Presse-1.Presse_RP, 3, 3, -9.
Presse-1.Presse_RP, 4, 4
Presse-1.Presse_RP, 5, 5
Presse-1.Presse_RP, 6, 6
**
** OUTPUT REQUESTS
**
*Restart, write, number interval=1, time marks=NO
**
** FIELD OUTPUT: all-profil-vol
**
*Output, field, time interval=0.1
*Node Output, nset=Pile-1.Pile_All
U,
*Element Output, elset=Pile-1.Pile_All, directions=YES
S,
**
** FIELD OUTPUT: FieldOutSoil
**
*Node Output, nset=Soil-1.Soil_All
A, U
*Element Output, elset=Soil-1.Soil_All, directions=YES
EVF, SVAVG
**
** HISTORY OUTPUT: mantel
**
*Output, history, time interval=0.01
*Contact Output, surface=Pile-1.Mantel
CFS3,
**
** HISTORY OUTPUT: RF
**
*Node Output, nset=Presse-1.Presse_RP
RF1, RF2, RF3, RM3, U3
**
** HISTORY OUTPUT: spitzendruck
**
*Contact Output, surface=Pile-1.spitzendruck
CFN3,
*End Step
